// SBML level 3 version 1
// Created with https://github.com/matthiaskoenig/sbmlutils.

function G_thresholding(x, y)
  piecewise(1, x > y, 0);
end
G_thresholding is "G tresholding";

model meal_model(Vext)
  // Meal model
  // Terms of use
  // The content of this model has been carefully created in a manual research effort. This file has been created by Matthias König using sbmlutils. For questions contact koenigmx@hu-berlin.de. Copyright © 2024 Matthias König.
  // This work is licensed under a Creative Commons Attribution 4.0 International License.
  // Redistribution and use of any part of this model, with or without modification, are permitted provided that the following conditions are met:
  // Redistributions of this SBML file must retain the above copyright notice, this list of conditions and the following disclaimer.
  // Redistributions in a different form must reproduce the above copyright notice, this list of conditions and the following disclaimer in the documentation and/or other materials provided with the distribution.
  // This model is distributed in the hope that it will be useful, but WITHOUT ANY WARRANTY; without even the implied warranty of MERCHANTABILITY or FITNESS FOR A PARTICULAR PURPOSE.
  // model units - substance: mmole, time: min, volume: litre, area: m2, length: metre, extent: mmole

  // Compartments:
  compartment Vext = 4 litre; Vext is "plasma";  // SBO:0000290 ncit:C13356

  // Species:
  species g_plasma in Vext = 0;  // SBO:0000247 CHEBI:6904 ncit:C61845 inchikey:IUBSYMUCCVWXPE-UHFFFAOYSA-N
  species g_integral in Vext = 0;  // SBO:0000247 CHEBI:6904 ncit:C61845 inchikey:IUBSYMUCCVWXPE-UHFFFAOYSA-N
  species I_PL in Vext = 0; I_PL is "i_plasma";  // SBO:0000247 CHEBI:6904 ncit:C61845 inchikey:IUBSYMUCCVWXPE-UHFFFAOYSA-N
  species i_delay1 in Vext = 0;  // SBO:0000247 CHEBI:6904 ncit:C61845 inchikey:IUBSYMUCCVWXPE-UHFFFAOYSA-N
  species i_delay2 in Vext = 0;  // SBO:0000247 CHEBI:6904 ncit:C61845 inchikey:IUBSYMUCCVWXPE-UHFFFAOYSA-N
  species i_delay3 in Vext = 0;  // SBO:0000247 CHEBI:6904 ncit:C61845 inchikey:IUBSYMUCCVWXPE-UHFFFAOYSA-N
  species nefa_plasma in Vext = 0;  // SBO:0000247 CHEBI:6904 ncit:C61845 inchikey:IUBSYMUCCVWXPE-UHFFFAOYSA-N
  species tg_plasma in Vext = 0;  // SBO:0000247 CHEBI:6904 ncit:C61845 inchikey:IUBSYMUCCVWXPE-UHFFFAOYSA-N

  // Parameters:
  f_G = 0.005551 mg_per_l;  // SBO:0000002
  f_TG = 0.00113 mmole_per_ml;  // SBO:0000002
  f_I = 1 to_mmole_per_l;  // SBO:0000002
  tau_i = 31 min;  // SBO:0000002
  tau_d = 3 min;  // SBO:0000002
  G_th_PL = 9 dimensionless;  // SBO:0000002
  c1 = 0.1 dimensionless;  // SBO:0000002
  V_G = 0.2428571 dimensionless;  // SBO:0000002
  V_TG = 0.06 dimensionless;  // SBO:0000002
  t_integralwindow = 30 dimensionless;  // SBO:0000002
  k1 = 0.0105 per_min; k1 is "K1";  // SBO:0000002
  k2 = 0.28 per_min; k2 is "K2";  // SBO:0000002
  k3 = 0.00607 per_min; k3 is "K3";  // SBO:0000002
  k4 = 0.000235 micro_mole_glucose_rate; k4 is "K4";  // SBO:0000002
  k5 = 0.0424 micro_mole_glucose_rate; k5 is "K5";  // SBO:0000002
  k6 = 2.2975 micro_iu_insulin_rate; k6 is "K6";  // SBO:0000002
  k7 = 1.15 micro_iu_insulin_rate; k7 is "K7";  // SBO:0000002
  k8 = 7.27 micro_iu_insulin_rate; k8 is "K8";  // SBO:0000002
  k9 = 0.0383 per_min; k9 is "K9";  // SBO:0000002
  k10 = 0.284 per_min; k10 is "K10";  // SBO:0000002
  sigma = 1.4 dimensionless;  // SBO:0000002
  KM = 13.2 mmole_glucose_per_l;  // SBO:0000002
  G_b = 5 mmole_glucose_per_l;  // SBO:0000002
  I_PL_b = 18 mmole_glucose_per_l;  // SBO:0000002
  G_liv_b = 0.043 mmole_glucose_per_l_min; G_liv_b is "I_pl_b";  // SBO:0000002
  spill = 30 dimensionless;  // SBO:0000002
  k11 = 0.00045 lipolysis_coefficien_unit; k11 is "K11";  // SBO:0000002
  ATL_max = 0.215 mmole_nefa_per_l_min;  // SBO:0000002
  K_ATL = 0.0385 ml_sqr_per_micro_iu_sqr;  // SBO:0000002
  k12 = 0.0713 per_min;  // SBO:0000002
  tau_LPL = 208.88 min;  // SBO:0000002
  k13 = 0.0088 per_min;  // SBO:0000002
  k14 = 0.0163 per_min;  // SBO:0000002
  k15 = 1e-5 micromol_tg_per_min_microiu;  // SBO:0000002
  k16 = 0.0119 mmole_tg_per_l_min;  // SBO:0000002
  M_G_gut = 0 mg;
  D_meal_G = 75000 mg;
  D_meal_TG = 60000 mg; D_meal_TG is "D_meal_G";
  G_PL = 5 mg;
  I_d1 = 0;
  BW = 75;
  I_PL_0 = 0; I_PL_0 is "i_plasma";  // CHEBI:6904 ncit:C61845 inchikey:IUBSYMUCCVWXPE-UHFFFAOYSA-N
  I_d2 = 0;
  I_d3 = 0;
  I_d4 = 0;
  NEFA_PL = 0.33; NEFA_PL is "fasting plasma NEFA concentration";
  M_TG_gut_1 = 0 mg; M_TG_gut_1 is "initial maas of triglyceride in the digestive tract";
  M_TG_gut_2 = 0 mg; M_TG_gut_2 is "initial maas of triglyceride in the digestive tract/lymphatic system";
  M_TG_gut_3 = 0 mg; M_TG_gut_3 is "initial maas of triglyceride in the lymphatic system";
  TG_PL = 1.3 mg; TG_PL is "initial maas of triglyceride in the lymphatic system";
  g_gut = 0;  // CHEBI:6904 ncit:C61845 inchikey:IUBSYMUCCVWXPE-UHFFFAOYSA-N
  i_intestitial = 0;  // CHEBI:6904 ncit:C61845 inchikey:IUBSYMUCCVWXPE-UHFFFAOYSA-N
  var TG_gut; TG_gut is "TGgut";  // CHEBI:6904 ncit:C61845 inchikey:IUBSYMUCCVWXPE-UHFFFAOYSA-N
  tg_delay1 = 0;  // CHEBI:6904 ncit:C61845 inchikey:IUBSYMUCCVWXPE-UHFFFAOYSA-N
  tg_delay2 = 0;  // CHEBI:6904 ncit:C61845 inchikey:IUBSYMUCCVWXPE-UHFFFAOYSA-N
  I_pnc = 0; I_pnc is "integral insulin";  // CHEBI:6904 ncit:C61845 inchikey:IUBSYMUCCVWXPE-UHFFFAOYSA-N
  c2 has dimensionless;
  c3 has dimensionless;
  G_meal has dimensionless;
  G_liv has dimensionless;
  G_gut has dimensionless;
  U_ii has dimensionless;
  U_id has dimensionless;
  U_ren has dimensionless;
  I_liv has dimensionless; I_liv is "insulin liver";
  i_rem has dimensionless; i_rem is "insulin from plasma to remote compartment";
  TG_meal has dimensionless; TG_meal is "triglyceride appearance from meal";
  LPL has dimensionless; LPL is "uptake of circulating triglyceride into tissues via LPL lipolysis";
  VLDL has dimensionless; VLDL is "secretion of endogenous triglyceride from the liver (VLDL)";
  frac_spill has dimensionless; frac_spill is "fractional spill-over";

  // Assignment rules:
  c2 := G_liv_b*(KM + G_b)/G_b - k5*f_I*G_liv_b;
  c3 := k7*G_b/(f_I*tau_i*I_PL_b)*t_integralwindow;
  G_meal := sigma*k1^sigma*time^(sigma - 1)*exp(-(k1*time)^sigma)*D_meal_G;
  G_liv := G_liv_b - k4*f_I*I_d1 - k3*(G_PL - G_b);
  G_gut := k2*(f_G/(V_G*BW))*M_G_gut;
  U_ii := G_liv_b*((KM + G_b)/G_b)*(G_PL/(KM + G_PL));
  U_id := k5*f_I*I_d1*(G_PL/(KM + G_PL));
  U_ren := c1/(V_G*BW)*(G_PL - G_th_PL)*G_thresholding(G_PL, G_th_PL);
  I_liv := k7*(G_b/(f_I*tau_i*I_PL_b))*I_PL;
  i_rem := k9*(I_PL - I_PL_b);
  TG_meal := sigma*k13^sigma*time^(sigma - 1)*exp(-(k13*time)^sigma)*D_meal_TG;
  TG_gut := k14*(f_TG/(V_TG*BW))*M_TG_gut_3;
  LPL := k11*TG_PL*I_d4;
  VLDL := k16 - k15*(I_d4 - I_PL_b);
  frac_spill := 1/100*spill*(I_PL_b/I_d2);

  // Rate rules:
  M_G_gut' = G_meal - k2*M_G_gut;
  G_PL' = G_liv + G_gut - U_ii - U_id - U_ren;
  I_pnc' = f_I^(-1)*(k6*(G_PL - G_b) + k7/tau_i*(G_PL - G_b) + k7/tau_i*G_b + k8*tau_d*G_PL);
  I_d1' = k9*(I_PL - I_PL_b) - k10*I_d1;
  I_PL' = I_pnc - I_liv - i_rem;
  I_d2' = 3/tau_LPL*(I_PL - I_d2);
  I_d3' = 3/tau_LPL*(I_d2 - I_d3);
  I_d4' = 3/tau_LPL*(I_d3 - I_d4);
  M_TG_gut_1' = TG_meal - k14*M_TG_gut_1;
  M_TG_gut_2' = k14*M_TG_gut_1 - k14*M_TG_gut_2;
  M_TG_gut_3' = k14*M_TG_gut_2 - k14*M_TG_gut_3;
  TG_PL' = VLDL + TG_gut - LPL;

  // Unit definitions:
  unit g_per_mole = gram / mole; g_per_mole is "g/mole";
  unit litre_per_min = litre / (60 second); litre_per_min is "litre/min";
  unit lipolysis_coefficien_unit = 1e-3 litre / (3.490546e-8 gram * 60 second); lipolysis_coefficien_unit is "213.32*μg*1000*ml/(34.7*μg*176.12*μg*1000*min)";
  unit m2 = metre^2; m2 is "meter^2";
  unit mM = 1e-3 mole / litre; mM is "mmole/liter";
  unit mg = 1e-3 gram;
  unit mg_per_l = 1e-3 gram / litre; mg_per_l is "mg/litre";
  unit micro_iu_insulin = 3.47e-5 gram; micro_iu_insulin is "34.7*μg";
  unit micro_iu_insulin_rate = 1 / (11.56667 second); micro_iu_insulin_rate is "34.7*μg/(180*μg*min)";
  unit micro_mole_glucose = 1.8e-4 gram; micro_mole_glucose is "180*μg";
  unit micro_mole_glucose_per_ml = 1.8e-4 gram / (1e-3 litre); micro_mole_glucose_per_ml is "180*μg/ml";
  unit micro_mole_glucose_rate = 1 / (311.2392 second); micro_mole_glucose_rate is "180*μg/(34.7*μg*min)";
  unit micromol_tg_per_min_microiu = 1 / (304.5303 second); micromol_tg_per_min_microiu is "176.12*μg/(min*34.7*μg)";
  unit min = 60 second;
  unit ml_sqr_per_micro_iu_sqr = (5.368281e-3 litre)^2 * (1e-3 gram)^2; ml_sqr_per_micro_iu_sqr is "ml^2/34.7*μg^2";
  unit mmole = 1e-3 mole;
  unit mmole_glucose_per_l = 0.18 gram / litre; mmole_glucose_per_l is "180*μg*1000/liter";
  unit mmole_glucose_per_l_min = 0.18 gram / (litre * 60 second); mmole_glucose_per_l_min is "180*μg*1000/(liter*min)";
  unit mmole_nefa_per_l_min = 0.21332 gram / (litre * 60 second); mmole_nefa_per_l_min is "213.32*μg*1000/(liter*min)";
  unit mmole_per_min = 1e-3 mole / (60 second); mmole_per_min is "mmole/min";
  unit mmole_per_min_l = 1e-3 mole / (60 second * litre); mmole_per_min_l is "mmole/min/liter";
  unit mmole_per_ml = 1e-3 mole / (1e-3 litre); mmole_per_ml is "mmole/ml";
  unit mmole_tg_per_l_min = 0.17612 gram / (litre * 60 second); mmole_tg_per_l_min is "176.12*μg*1000/(liter*min)";
  unit per_min = 1 / (60 second); per_min is "1/min";
  unit to_mmole_per_l = 1e-3 mole * 60 second / (1e-3 litre * litre); to_mmole_per_l is "(34.7*μg/ml)*((mmole*min)/(34.7*μg*liter))";
end
